<Lems>

    <!--

        This LEMS file has been automatically generated using PyNeuroML v1.0.0 (libNeuroML v0.5.0)

     -->

    <!-- Specify which component to run -->
    <Target component="test_probAMPANMDA"/>

    <!-- Include core NeuroML2 ComponentType definitions -->
    <Include file="Cells.xml"/>
    <Include file="Networks.xml"/>
    <Include file="Simulation.xml"/>

    <Include file="testProbAMPANMDA.net.nml"/>
    <Include file="ProbAMPANMDA.synapsedef.nml"/>
    <Include file="ProbAMPANMDA.synapse.nml"/>

    <Simulation id="test_probAMPANMDA" length="1000ms" step="0.1ms" target="TestNet" seed="123">  <!-- Note seed: ensures same random numbers used every run -->

    </Simulation>

</Lems>
