<Lems xmlns="http://www.neuroml.org/lems/0.7.6"
      xmlns:xsi="http://www.w3.org/2001/XMLSchema-instance"
      xsi:schemaLocation="http://www.neuroml.org/lems/0.7.6 ../../LEMS/Schemas/LEMS/LEMS_v0.7.6.xsd"
      description="Defines a Component of ProbAMPANMDASyn ComponentType">

    <Include file="ProbAMPANMDA.synapse.nml" />
    <!-- from the mod file -->
    <Component type="ProbAMPANMDASyn" id="probAMPANMDASyn"
        tau_r_AMPA="0.2 ms"
        tau_d_AMPA="1.7 ms"
        tau_r_NMDA="0.29 ms"
        tau_d_NMDA="43 ms"
        Use="1"
        Dep="100 ms"
        Fac="10 ms"
        mg="1 mM"
        gbase="0.001 uS"
        weight_factor_NMDA="1"
        u0="0"
        erev="0 mV"
    />

</Lems>
